*Heading
** Job name: t05_L10_theta50_50_4unit_dynamics_c460_0929 Model name: t05_L10_theta50-50_TwoBeam_single_Dynamic_0929
** Generated by: Abaqus/CAE 2022
*Preprint, echo=NO, model=NO, history=NO, contact=NO
**
** PARTS
**
*Part, name=t05_L10_theta5050_4unit
*Node
      1,     94.09552, -1.88134493e-07
      2,     94.09552,          -4.
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*Element, type=CPS3
  1,    1,  133, 2597
  2, 2597,  162,    1
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*Nset, nset=PDMS, generate
    1,  8497,     1
*Elset, elset=PDMS, generate
     1,  14686,      1
*Nset, nset=TopEdge
    1,    4,    5,    8,   10,   25
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*Elset, elset=TopEdge
     2,    10,    18,    26,    34,    42
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*Nset, nset=BottomEdge
   16,   17,   24,   28,   29,   44
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*Elset, elset=BottomEdge
  1537,  1539,  1541,  1543,  1545,  1547
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** Section: PDMS
*Solid Section, elset=PDMS, material=PDMS
,
*End Part
**
**
** ASSEMBLY
**
*Assembly, name=Assembly
**
*Instance, name=t05_L10_theta5050_4unit-1, part=t05_L10_theta5050_4unit
*End Instance
**
*End Assembly
**
** MATERIALS
**
*Material, name=PDMS
*Density
 1e-09,
*Elastic
 2.75, 0.374
**
** INTERACTION PROPERTIES
**
*Surface Interaction, name=Contact
1.,
*Friction
0.,
*Surface Behavior, pressure-overclosure=HARD
**
** BOUNDARY CONDITIONS
**
** Name: BottomClamp Type: Symmetry/Antisymmetry/Encastre
*Boundary
t05_L10_theta5050_4unit-1.BottomEdge, PINNED
**
** INTERACTIONS
**
** Interaction: Int-1
*Contact
*Contact Inclusions, ALL EXTERIOR
*Contact Property Assignment
 ,  , Contact
** ----------------------------------------------------------------
**
** STEP: Indent
**
*Step, name=Indent, nlgeom=YES, inc=1000000000
*Dynamic,application=QUASI-STATIC,initial=NO
0.001,460.,1e-06,5.
**
** BOUNDARY CONDITIONS
**
** Name: Indent Type: Velocity/Angular velocity
*Boundary, type=VELOCITY
t05_L10_theta5050_4unit-1.TopEdge, 1, 1
t05_L10_theta5050_4unit-1.TopEdge, 2, 2, -0.024
**
** OUTPUT REQUESTS
**
*Restart, write, frequency=0
**
** FIELD OUTPUT: F-Output-1
**
*Output, field, variable=PRESELECT
**
** HISTORY OUTPUT: H-Output-1
**
*Output, history, variable=PRESELECT
*End Step
** ----------------------------------------------------------------
**
** STEP: Equilibrium
**
*Step, name=Equilibrium, nlgeom=YES, inc=10000000
*Dynamic,application=MODERATE DISSIPATION,initial=NO
0.001,100.,1e-06,5.
**
** BOUNDARY CONDITIONS
**
** Name: Indent Type: Velocity/Angular velocity
*Boundary, type=VELOCITY
t05_L10_theta5050_4unit-1.TopEdge, 2, 2
**
** OUTPUT REQUESTS
**
*Restart, write, frequency=0
**
** FIELD OUTPUT: F-Output-1
**
*Output, field, variable=PRESELECT
**
** HISTORY OUTPUT: H-Output-1
**
*Output, history, variable=PRESELECT
*End Step
** ----------------------------------------------------------------
**
** STEP: Retract
**
*Step, name=Retract, nlgeom=YES, inc=10000000
*Dynamic
0.01,500.,1e-10,5.
**
** BOUNDARY CONDITIONS
**
** Name: BottomClamp Type: Symmetry/Antisymmetry/Encastre
*Boundary, op=NEW
t05_L10_theta5050_4unit-1.BottomEdge, PINNED
** Name: Indent Type: Velocity/Angular velocity
*Boundary, op=NEW
**
** OUTPUT REQUESTS
**
*Restart, write, frequency=0
**
** FIELD OUTPUT: F-Output-1
**
*Output, field, variable=PRESELECT
**
** HISTORY OUTPUT: H-Output-1
**
*Output, history, variable=PRESELECT
*End Step
