*Heading
** Job name: t1_L10_theta45-50_TwoBeam_mesh4-50_mu1_lambda3 Model name: t1_L10_theta45-50_TwoBeam
** Generated by: Abaqus/CAE 2021
*Preprint, echo=NO, model=NO, history=NO, contact=NO
**
** PARTS
**
*Part, name=t1_L10_theta45-50_TwoBeam
*Node
      1,  -13.4593115,   21.0710678
      2,  -13.4593115,   17.0710678
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*Element, type=CPE3
 1,   1,  25, 517
 2, 517,  48,   1
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*Nset, nset=BottomEdge
  18,  19,  21,  24, 381, 382
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*Elset, elset=BottomEdge
 1866, 1898, 1930, 1962, 1994, 2026
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*Nset, nset=TopEdge
   1,   4,   6,   7,  40,  41
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*Elset, elset=TopEdge
   2,  10,  18,  26,  34,  42
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*Nset, nset=PDMS, generate
    1,  1778,     1
*Elset, elset=PDMS, generate
    1,  3080,     1
** Section: PDMS
*Solid Section, elset=PDMS, controls=EC-1, material=PDMS
,
*End Part
**
**
** ASSEMBLY
**
*Assembly, name=Assembly
**
*Instance, name=t1_L10_theta45-50_TwoBeam-1, part=t1_L10_theta45-50_TwoBeam
   19.333588,           0.,           0.
*End Instance
**
*Elset, elset=_InnerSurf_S1, internal, instance=t1_L10_theta45-50_TwoBeam-1
  353,  355,  357,  359,  361,  363
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*Elset, elset=_InnerSurf_S2, internal, instance=t1_L10_theta45-50_TwoBeam-1
 1041, 1049, 1057, 1065, 1073, 1081
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*Surface, type=ELEMENT, name=InnerSurf
_InnerSurf_S1, S1
_InnerSurf_S2, S2
*Elset, elset=_OutSurf_Left_S2, internal, instance=t1_L10_theta45-50_TwoBeam-1
   82,   90,   98,  106,  114,  122
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*Elset, elset=_OutSurf_Left_S3, internal, instance=t1_L10_theta45-50_TwoBeam-1, generate
 1435,  1827,     8
*Surface, type=ELEMENT, name=OutSurf_Left
_OutSurf_Left_S2, S2
_OutSurf_Left_S3, S3
*Elset, elset=_OuterSurf_Right_S2, internal, instance=t1_L10_theta45-50_TwoBeam-1
    7,   15,   23,   31,   39,   47
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*Elset, elset=_OuterSurf_Right_S3, internal, instance=t1_L10_theta45-50_TwoBeam-1, generate
 1963,  2411,    32
*Surface, type=ELEMENT, name=OuterSurf_Right
_OuterSurf_Right_S2, S2
_OuterSurf_Right_S3, S3
*End Assembly
**
** ELEMENT CONTROLS
**
*Section Controls, name=EC-1, DISTORTION CONTROL=YES
1., 1., 1.
**
** MATERIALS
**
*Material, name=PDMS
*Density
 1e-09,
*Elastic
 2.75, 0.374
**
** INTERACTION PROPERTIES
**
*Surface Interaction, name=Self_Contact
1.,
*Friction
0.,
*Surface Behavior, pressure-overclosure=HARD
**
** BOUNDARY CONDITIONS
**
** Name: BottomClamp Type: Symmetry/Antisymmetry/Encastre
*Boundary
t1_L10_theta45-50_TwoBeam-1.BottomEdge, PINNED
**
** INTERACTIONS
**
** Interaction: Inner_Contact
*Contact Pair, interaction=Self_Contact, type=SURFACE TO SURFACE
InnerSurf,
** Interaction: OuterContact_Right
*Contact Pair, interaction=Self_Contact, type=SURFACE TO SURFACE
OuterSurf_Right,
** Interaction: Outer_Contact_Left
*Contact Pair, interaction=Self_Contact, type=SURFACE TO SURFACE
OutSurf_Left,
** ----------------------------------------------------------------
**
** STEP: Indent
**
*Step, name=Indent, nlgeom=YES, inc=1000000000
*Dynamic,application=QUASI-STATIC,initial=NO
0.001,50.,1e-06,0.1
**
** BOUNDARY CONDITIONS
**
** Name: Indent Type: Velocity/Angular velocity
*Boundary, type=VELOCITY
t1_L10_theta45-50_TwoBeam-1.TopEdge, 1, 1
t1_L10_theta45-50_TwoBeam-1.TopEdge, 2, 2, -0.24
**
** OUTPUT REQUESTS
**
*Restart, write, frequency=0
**
** FIELD OUTPUT: F-Output-1
**
*Output, field, variable=PRESELECT
**
** HISTORY OUTPUT: H-Output-1
**
*Output, history, variable=PRESELECT
*End Step
** ----------------------------------------------------------------
**
** STEP: Equilibrium
**
*Step, name=Equilibrium, nlgeom=YES, inc=100000000
*Static
1e-06, 1., 1e-10, 1.
**
** BOUNDARY CONDITIONS
**
** Name: BottomClamp Type: Symmetry/Antisymmetry/Encastre
*Boundary, op=NEW
t1_L10_theta45-50_TwoBeam-1.BottomEdge, PINNED
** Name: Indent Type: Velocity/Angular velocity
*Boundary, op=NEW
**
** OUTPUT REQUESTS
**
*Restart, write, frequency=0
**
** FIELD OUTPUT: F-Output-1
**
*Output, field, variable=PRESELECT, frequency=10
**
** HISTORY OUTPUT: H-Output-1
**
*Output, history, variable=PRESELECT, frequency=10
*End Step
