*Heading
** Job name: t06_L5_theta40-50_twobeam_mesh4-50_indent5_n200_Quasi_mu1_lambda3_E100_nu03 Model name: t06_L5_theta40-50_TwoBeam
** Generated by: Abaqus/CAE 2021
*Preprint, echo=NO, model=NO, history=NO, contact=NO
**
** PARTS
**
*Part, name=t06_L5_theta40-50_twobeam
*Node
      1,          2.5,   3.20000005
      2,   1.72000003,   3.20000005
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*Element, type=CPE3
  1,   1,  11, 273
  2, 273, 114,   1
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*Nset, nset=TopEdge
   7,   8, 141, 142, 143, 144
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*Elset, elset=TopEdge, generate
 816,  860,    2
*Nset, nset=Hard_Mater
   1,   2,   5,   6,   7,   8
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*Elset, elset=Hard_Mater, generate
 401,  860,    1
*Nset, nset=PDMS
   1,   2,   3,   4,   5,   6
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*Elset, elset=PDMS
    1,    2,    3,    4,    5,    6
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*Nset, nset=BottomEdge
   3,   4,   9,  10,  63,  64,  65, 221, 222, 223
*Elset, elset=BottomEdge
  394,  396,  398,  400, 1254, 1256, 1258, 1260
** Section: PDMS
*Solid Section, elset=PDMS, controls=EC-1, material=PDMS
,
** Section: Hard_Mater
*Solid Section, elset=Hard_Mater, controls=EC-1, material=Hard_Mater
,
*End Part
**
**
** ASSEMBLY
**
*Assembly, name=Assembly
**
*Instance, name=t06_L5_theta40-50_twobeam-1, part=t06_L5_theta40-50_twobeam
*End Instance
**
*End Assembly
**
** ELEMENT CONTROLS
**
*Section Controls, name=EC-1, DISTORTION CONTROL=YES
1., 1., 1.
**
** MATERIALS
**
*Material, name=Hard_Mater
*Density
 1e-09,
*Elastic
100., 0.3
*Material, name=PDMS
*Density
 1e-09,
*Elastic
 2.75, 0.374
**
** BOUNDARY CONDITIONS
**
** Name: BottomClamp Type: Displacement/Rotation
*Boundary
t06_L5_theta40-50_twobeam-1.BottomEdge, 1, 1
t06_L5_theta40-50_twobeam-1.BottomEdge, 2, 2
** Name: TopRestraint Type: Displacement/Rotation
*Boundary
t06_L5_theta40-50_twobeam-1.TopEdge, 1, 1
** ----------------------------------------------------------------
**
** STEP: Indent
**
*Step, name=Indent, nlgeom=YES, inc=100000000
*Dynamic,application=QUASI-STATIC,initial=NO
0.001,50.,1e-06
**
** BOUNDARY CONDITIONS
**
** Name: Indent Type: Velocity/Angular velocity
*Boundary, type=VELOCITY
t06_L5_theta40-50_twobeam-1.TopEdge, 2, 2, -0.1
**
** OUTPUT REQUESTS
**
*Restart, write, frequency=0
**
** FIELD OUTPUT: F-Output-1
**
*Output, field, variable=PRESELECT, number interval=200
**
** HISTORY OUTPUT: H-Output-1
**
*Output, history, variable=PRESELECT, number interval=200
*End Step
** ----------------------------------------------------------------
**
** STEP: Equilibrium
**
*Step, name=Equilibrium, nlgeom=YES, inc=100000000
*Static
1e-05, 1., 1e-10, 1.
**
** BOUNDARY CONDITIONS
**
** Name: BottomClamp Type: Displacement/Rotation
*Boundary, op=NEW
t06_L5_theta40-50_twobeam-1.BottomEdge, 1, 1
t06_L5_theta40-50_twobeam-1.BottomEdge, 2, 2
** Name: Indent Type: Velocity/Angular velocity
*Boundary, op=NEW
** Name: TopRestraint Type: Displacement/Rotation
*Boundary, op=NEW
t06_L5_theta40-50_twobeam-1.TopEdge, 1, 1
**
** OUTPUT REQUESTS
**
*Restart, write, frequency=0
**
** FIELD OUTPUT: F-Output-1
**
*Output, field, variable=PRESELECT
**
** HISTORY OUTPUT: H-Output-1
**
*Output, history, variable=PRESELECT
*End Step
