*Heading
** Job name: BuckleBeam_y1_Left_mesh4-50 Model name: Buckle_Beam
** Generated by: Abaqus/CAE 2021
*Preprint, echo=NO, model=NO, history=NO, contact=NO
**
** PARTS
**
*Part, name=Buckle_Beam
*Node
      1,           0.,         -50.
      2,           0.,          50.
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*Element, type=CPE3
  1,   1,   7, 305
  2, 305, 204,   1
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*Nset, nset=Buckle_Beam, generate
   1,  500,    1
*Elset, elset=Buckle_Beam, generate
   1,  792,    1
*Nset, nset=TopEdge
   2,   3,   6, 105, 304
*Elset, elset=TopEdge
 197, 395, 398, 596
*Nset, nset=BottomEdge
   1,   4,   5, 204, 205
*Elset, elset=BottomEdge
   2, 200, 593, 791
*Nset, nset=Top_Center
 2,
*Nset, nset=Bottom_Center
 1,
*Nset, nset=Bottom_Edge
 4, 5
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*Elset, elset=_LeftSurf_S1, internal, generate
 200,  396,    2
*Surface, type=ELEMENT, name=LeftSurf
_LeftSurf_S1, S1
*Elset, elset=_RightSurf_S1, internal, generate
 596,  792,    2
*Surface, type=ELEMENT, name=RightSurf
_RightSurf_S1, S1
** Section: VPS
*Solid Section, elset=Buckle_Beam, controls=EC-1, material=VPS
,
*End Part
**
*Part, name=Indenter_Left
*Node
      1,           0.,          10.
      2,           0.,         -10.
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*Element, type=CPE4R
 1,  3,  1, 12, 27
 2, 13, 21, 27, 12
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*Nset, nset=Indenter_Left, generate
  1,  41,   1
*Elset, elset=Indenter_Left, generate
  1,  30,   1
*Elset, elset=_Indenter_Surf_Left_S1, internal
  1, 17, 27, 28
*Elset, elset=_Indenter_Surf_Left_S3, internal
 12, 16, 18, 24, 29, 30
*Surface, type=ELEMENT, name=Indenter_Surf_Left
_Indenter_Surf_Left_S1, S1
_Indenter_Surf_Left_S3, S3
** Section: Indenter
*Solid Section, elset=Indenter_Left, controls=EC-2, material=Indenter
,
*End Part
**
*Part, name=Indenter_Right
*Node
      1,           0.,          10.
      2,           0.,         -10.
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*Element, type=CPE4R
 1,  1, 11, 38, 12
 2, 13, 12, 38, 21
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*Nset, nset=Indenter_Right, generate
  1,  40,   1
*Elset, elset=Indenter_Right, generate
  1,  29,   1
*Elset, elset=_Indenter_Surf_Right_S1, internal
  1,  9, 21, 23
*Elset, elset=_Indenter_Surf_Right_S3, internal
 16,
*Elset, elset=_Indenter_Surf_Right_S4, internal
 17, 19, 20, 25
*Elset, elset=_Indenter_Surf_Right_S2, internal
 28,
*Surface, type=ELEMENT, name=Indenter_Surf_Right
_Indenter_Surf_Right_S1, S1
_Indenter_Surf_Right_S3, S3
_Indenter_Surf_Right_S4, S4
_Indenter_Surf_Right_S2, S2
** Section: Indenter
*Solid Section, elset=Indenter_Right, controls=EC-2, material=Indenter
,
*End Part
**
**
** ASSEMBLY
**
*Assembly, name=Assembly
**
*Instance, name=Buckle_Beam-1, part=Buckle_Beam
*End Instance
**
*Instance, name=Indenter_Left-1, part=Indenter_Left
        -36.,           0.,           0.
*End Instance
**
*Instance, name=Indenter_Right-1, part=Indenter_Right
         12.,           0.,           0.
*End Instance
**
*End Assembly
**
** ELEMENT CONTROLS
**
*Section Controls, name=EC-1, DISTORTION CONTROL=YES
1., 1., 1.
*Section Controls, name=EC-2, DISTORTION CONTROL=YES, hourglass=ENHANCED
1., 1., 1.
**
** MATERIALS
**
*Material, name=Indenter
*Density
 1e-09,
*Elastic
1000., 0.3
*Material, name=VPS
*Density
 1e-09,
*Elastic
 0.18, 0.45
**
** INTERACTION PROPERTIES
**
*Surface Interaction, name=IntProp-1
1.,
*Friction
0.,
*Surface Behavior, pressure-overclosure=HARD
**
** BOUNDARY CONDITIONS
**
** Name: BottomClamp Type: Displacement/Rotation
*Boundary
Buckle_Beam-1.BottomEdge, 1, 1
Buckle_Beam-1.BottomEdge, 2, 2
**
** INTERACTIONS
**
** Interaction: Left_Contact
*Contact Pair, interaction=IntProp-1
Buckle_Beam-1.LeftSurf, Indenter_Left-1.Indenter_Surf_Left
** Interaction: Right_Contact
*Contact Pair, interaction=IntProp-1
Buckle_Beam-1.RightSurf, Indenter_Right-1.Indenter_Surf_Right
** ----------------------------------------------------------------
**
** STEP: Compression
**
*Step, name=Compression, nlgeom=YES, inc=100000000
*Dynamic
0.1,100.,1e-06
**
** BOUNDARY CONDITIONS
**
** Name: Load Type: Velocity/Angular velocity
*Boundary, type=VELOCITY
Buckle_Beam-1.TopEdge, 1, 1
Buckle_Beam-1.TopEdge, 2, 2, -0.01
** Name: Right_Indent Type: Velocity/Angular velocity
*Boundary, type=VELOCITY
Indenter_Right-1.Indenter_Right, 1, 1, -0.03
Indenter_Right-1.Indenter_Right, 2, 2
**
** OUTPUT REQUESTS
**
*Restart, write, frequency=0
**
** FIELD OUTPUT: F-Output-1
**
*Output, field, variable=PRESELECT, frequency=1
**
** HISTORY OUTPUT: H-Output-1
**
*Output, history, variable=PRESELECT, frequency=1
*End Step
** ----------------------------------------------------------------
**
** STEP: Rotate
**
*Step, name=Rotate, nlgeom=YES, inc=100000000
*Dynamic
0.1,100.,1e-06
**
** BOUNDARY CONDITIONS
**
** Name: Load Type: Velocity/Angular velocity
*Boundary, type=VELOCITY
Buckle_Beam-1.TopEdge, 2, 2
** Name: Right_Indent Type: Velocity/Angular velocity
*Boundary, type=VELOCITY
Indenter_Right-1.Indenter_Right, 1, 1, 0.3
**
** OUTPUT REQUESTS
**
*Restart, write, frequency=0
**
** FIELD OUTPUT: F-Output-1
**
*Output, field, variable=PRESELECT, frequency=1
**
** HISTORY OUTPUT: H-Output-1
**
*Output, history, variable=PRESELECT, frequency=1
*End Step
** ----------------------------------------------------------------
**
** STEP: Equilibrium
**
*Step, name=Equilibrium, nlgeom=YES, inc=10000000
*Static
1e-05, 1., 1e-10, 1.
**
** BOUNDARY CONDITIONS
**
** Name: Right_Indent Type: Velocity/Angular velocity
*Boundary, type=VELOCITY
Indenter_Right-1.Indenter_Right, 1, 1
**
** OUTPUT REQUESTS
**
*Restart, write, frequency=0
**
** FIELD OUTPUT: F-Output-1
**
*Output, field, variable=PRESELECT
**
** HISTORY OUTPUT: H-Output-1
**
*Output, history, variable=PRESELECT
*End Step
** ----------------------------------------------------------------
**
** STEP: Saddle
**
*Step, name=Saddle, nlgeom=YES, inc=1000000000
*Dynamic
0.001,100.,1e-06
**
** OUTPUT REQUESTS
**
*Restart, write, frequency=0
**
** FIELD OUTPUT: F-Output-1
**
*Output, field, variable=PRESELECT, frequency=1
**
** HISTORY OUTPUT: H-Output-1
**
*Output, history, variable=PRESELECT, frequency=1
*End Step
